<?xml version="1.0"?>
<!-- Automatic Triangle removing with Triangle2Edge mapping example: Element removed are define in: ./RemovingTrianglesProcess.txt -->
<Node name="root" gravity="0 1 -9" dt="0.01">
    <RequiredPlugin pluginName='SofaBoundaryCondition'/>
    <RequiredPlugin pluginName='SofaGeneralSimpleFem'/>
    <RequiredPlugin pluginName='SofaImplicitOdeSolver'/>
    <RequiredPlugin pluginName='SofaMiscCollision'/>
    <RequiredPlugin pluginName='SofaMiscTopology'/>
    <RequiredPlugin pluginName='SofaSimpleFem'/>
    <RequiredPlugin name="SofaEngine"/> <!-- Needed to use components [BoxROI] -->
    <RequiredPlugin name="SofaTopologyMapping"/> <!-- Needed to use components [Hexa2TetraTopologicalMapping] -->

    <VisualStyle displayFlags="showBehavior showVisual" />
    <DefaultPipeline name="default0" verbose="0" />
    <BruteForceBroadPhase/>
    <BVHNarrowPhase/>
    <DefaultContactManager name="default1" response="PenalityContactForceField" />
    <MinProximityIntersection name="Proximity" alarmDistance="0.8" contactDistance="0.5" />
    <DefaultCollisionGroupManager name="default2" />

    <RegularGridTopology name="grid" n="8 32 8" min="0 0 20" max="10 40 30" />
    <Node name="Beam_generator">
        <MechanicalObject src="@../grid" name="Volume" />
        <TetrahedronSetTopologyContainer name="Container" />
        <TetrahedronSetTopologyModifier name="Modifier" />
        <TetrahedronSetGeometryAlgorithms name="GeomAlgo" template="Vec3d" />
        <Hexa2TetraTopologicalMapping name="default28" input="@../grid" output="@Container" />
    </Node>


    <Node name="TetrahedralCorotational">
        <EulerImplicitSolver name="cg_odesolver" printLog="false"  rayleighStiffness="0.1" rayleighMass="0.1" />
        <CGLinearSolver iterations="25" name="linear solver" tolerance="1.0e-9" threshold="1.0e-9" />

        <MechanicalObject src="@../grid" name="Volume" translation="0 0 0"/>

        <TetrahedronSetTopologyContainer name="Tetra_con" src="@../Beam_generator/Container"/>
        <TetrahedronSetTopologyModifier name="Modifier" />
        <TetrahedronSetGeometryAlgorithms name="GeomAlgo" template="Vec3d" />

        <DiagonalMass massDensity="1.0" />
        <BoxROI name="ROI1" box="-1 -1 0 11 1 50" drawBoxes="0" />

        <FixedConstraint indices="@ROI1.indices" />
        <TetrahedralCorotationalFEMForceField name="Corotational" youngModulus="4000" poissonRatio="0.3" method="large" />

        <TopologyBoundingTrasher box="-20 -5 0 80 50 60" topology="@Tetra_con" drawBox="1" position="@Volume.position"/>
    </Node>

    <Node name="FastTetrahedralCorotational">
        <EulerImplicitSolver name="cg_odesolver" printLog="false"  rayleighStiffness="0.1" rayleighMass="0.1" />
        <CGLinearSolver iterations="25" name="linear solver" tolerance="1.0e-9" threshold="1.0e-9" />

        <!--<MechanicalObject src="@../grid" name="Volume" translation="15 0 0"/>-->
        <MechanicalObject src="@../grid" name="Volume" translation="0 0 0"/>

        <TetrahedronSetTopologyContainer name="Tetra_con" src="@../Beam_generator/Container"/>
        <TetrahedronSetTopologyModifier name="Modifier" />
        <TetrahedronSetGeometryAlgorithms name="GeomAlgo" template="Vec3d" />

        <DiagonalMass massDensity="1.0" />
        <!--<BoxROI name="ROI1" box="14 -1 0 26 1 50" drawBoxes="0" />-->
        <BoxROI name="ROI1" box="-1 -1 0 11 1 50" drawBoxes="0" />

        <FixedConstraint indices="@ROI1.indices" />
        <FastTetrahedralCorotationalForceField name="FastTetrahedral" youngModulus="4000" poissonRatio="0.3" method="large" />

        <TopologyBoundingTrasher box="-20 -5 0 80 50 60" topology="@Tetra_con" drawBox="1" position="@Volume.position"/>
    </Node>

<!--
    <Node name="TetrahedralTensorMass">
        <EulerImplicitSolver name="cg_odesolver" printLog="false"  rayleighStiffness="0.1" rayleighMass="0.1" />
        <CGLinearSolver iterations="25" name="linear solver" tolerance="1.0e-9" threshold="1.0e-9" />

        <MechanicalObject src="@../grid" name="Volume" translation="30 0 0"/>

        <TetrahedronSetTopologyContainer name="Tetra_con" src="@../Beam_generator/Container"/>
        <TetrahedronSetTopologyModifier name="Modifier" />
        <TetrahedronSetGeometryAlgorithms name="GeomAlgo" template="Vec3d" />

        <DiagonalMass massDensity="1.0" />
        <BoxROI name="ROI1" box="29 -1 0 41 1 50" drawBoxes="0" />

        <FixedConstraint indices="@ROI1.indices" />
        <TetrahedralTensorMassForceField name="TetrahedralTensorMass" youngModulus="4000" poissonRatio="0.3" />

        <TopologyBoundingTrasher box="-20 -5 0 80 50 60" topology="@Tetra_con" drawBox="1" position="@Volume.position"/>
    </Node>
-->
    <Node name="TetrahedronFEMForceField">
        <EulerImplicitSolver name="cg_odesolver" printLog="false"  rayleighStiffness="0.1" rayleighMass="0.1" />
        <CGLinearSolver iterations="25" name="linear solver" tolerance="1.0e-9" threshold="1.0e-9" />

        <!--<MechanicalObject src="@../grid" name="Volume" translation="45 0 0"/>-->
        <MechanicalObject src="@../grid" name="Volume" translation="0 0 0"/>

        <TetrahedronSetTopologyContainer name="Tetra_con" src="@../Beam_generator/Container"/>
        <TetrahedronSetTopologyModifier name="Modifier" />
        <TetrahedronSetGeometryAlgorithms name="GeomAlgo" template="Vec3d" />

        <DiagonalMass massDensity="1.0" />
        <!--<BoxROI name="ROI1" box="44 -1 0 56 1 50" drawBoxes="0" />-->
        <BoxROI name="ROI1" box="-1 -1 0 11 1 50" drawBoxes="0" />

        <FixedConstraint indices="@ROI1.indices" />
        <TetrahedronFEMForceField name="TetrahedronFEM" youngModulus="4000" poissonRatio="0.3" method="large" />

        <TopologyBoundingTrasher box="-20 -5 0 80 50 60" topology="@Tetra_con" drawBox="1" position="@Volume.position"/>
    </Node>


<!--
< name="CFEM" youngModulus="2000" poissonRatio="0.3" method="large" />
    <Node name="TetrahedralCorotationalFEMForceField1">
        <EulerImplicitSolver name="cg_odesolver" printLog="false"  rayleighStiffness="0.1" rayleighMass="0.1" />
        <CGLinearSolver iterations="25" name="linear solver" tolerance="1.0e-9" threshold="1.0e-9" />
        <MeshGmshLoader name="loader" filename="mesh/cylinder.msh" />
        <MechanicalObject src="@loader" name="TetrahedralCorotationalFEM" />
        <TetrahedronSetTopologyContainer name="Tetra_topo" src="@loader" />
        <TetrahedronSetTopologyModifier name="Modifier" />
        <TetrahedronSetGeometryAlgorithms name="GeomAlgo" template="Vec3d" />

        <DiagonalMass massDensity="0.5" />
        <FixedPlaneConstraint direction="0 0 1" dmin="-0.1" dmax="0.1" />
        <FixedConstraint indices="0" />
        <TetrahedralCorotationalFEMForceField name="FEM" youngModulus="360" poissonRatio="0.3" method="large" />

	<TopologicalChangeProcessor listening="1" filename="RemovingTetra2TriangleProcess.txt" />
    </Node>

    <Node name="TetrahedralCorotationalFEMForceField2">
        <EulerImplicitSolver name="cg_odesolver" printLog="false" />
        <CGLinearSolver iterations="25" name="linear solver" tolerance="1.0e-9" threshold="1.0e-9" />
        <MeshGmshLoader name="loader" filename="mesh/cylinder.msh" translation="0.5 0 0"/>
        <MechanicalObject src="@loader" name="TetrahedralCorotationalFEM" />
        <TetrahedronSetTopologyContainer name="Tetra_topo" src="@loader" />
        <TetrahedronSetTopologyModifier name="Modifier" />
        <TetrahedronSetGeometryAlgorithms name="GeomAlgo" template="Vec3d" />

        <DiagonalMass massDensity="0.5" />
        <FixedPlaneConstraint direction="0 0 1" dmin="-0.1" dmax="0.1" />
        <FixedConstraint indices="0" />
	<TetrahedronFEMForceField name="FEM" youngModulus="360" poissonRatio="0.3" computeGlobalMatrix="false" method="large" />

	<TopologicalChangeProcessor listening="1" filename="RemovingTetra2TriangleProcess.txt" />
    </Node>
-->

</Node>
